Given
λ := 9.5
P_11 := 0
μ_1 := 5
P_10 := 0
Q := 0.95
P_01 := 0
P_отк := 1 - Q
P_00 := 0
μ_2 := 0
λ*P_00 == μ_1*P_10 + μ_2*P_01
(λ + μ_1)*P_10 == λ*P_00 + μ_2*P_11
(λ + μ_2)*P_01 == μ_1*P_11
(μ_1 + μ_2)*P_11 == λ*P_10 + λ*P_01
P_00 + P_10 + P_11 + P_01 == 1
P_11 == P_отк
[P_00; P_10; P_11; P_01; μ_2] := Find(P_00, P_10, P_11, P_01, μ_2) = [0.342742; 0.605172; 0.05; 0.00208544; 110.379]
P_загр1 := P_10 + P_11 = 0.655172
P_загр2 := P_11 + P_01 = 0.0520854
A := Q*λ = 9.025
