P000 := 0
u := 4
P100 := 0
la := 25
P010 := 0
P110 := 0
P011 := 0
P111 := 0
P101 := 0
P001 := 0
Given
la*P000 == 2*u*P010 + u*P001 + 3*u*P100
(3*u + la)*P100 == la*P000 + 2*u*P110 + u*P101
(2*u + la)*P010 == 3*u*P110 + u*P011
(3*u + 2*u + la)*P110 == la*P100 + la*P010 + u*P111
(2*u + u + la)*P011 == 3*u*P111
(3*u + 2*u + u)*P111 == la*P110 + la*P011 + la*P101
(3*u + u + la)*P101 == 2*u*P111 + la*P001
(u + la)*P001 == 2*u*P011 + 3*u*P101
P000 + P100 + P010 + P110 + P011 + P111 + P101 + P001 == 1
[P000; P100; P010; P110; P011; P111; P101; P001] := Find(P000, P100, P010, P110, P011, P111, P101, P001) = [0.0710031; 0.0845969; 0.0538571; 0.10904; 0.1172; 0.361367; 0.120672; 0.0822641]
Pзагр1 := P100 + P110 + P111 + P101 = 0.675676
Pзагр2 := P010 + P110 + P011 + P111 = 0.641464
Pзагр3 := P001 + P011 + P101 + P111 = 0.681502
Pотк := P111
q := 1 - Pотк
A := la*q = 15.9658
